A := 2
B := 2
Xst := -60
Xfin := 60
C := 3
D := 3
Yst := -60
Yfin := 60
func(x, y) := A*x^2 + B*y^2 + C*e^(-x) + D*e^(-y)
# [component: inputs func]
f := integral(integral(func(x, y), x = Xst .. Xfin), y = Yst .. Yfin) = 8.22245e28
fa := integral(integral(sqrt(1 + (d/dx(func(x, y)))^2 + (d/dy(func(x, y)))^2), x = Xst .. Xfin), y = Yst .. Yfin) = 8.16942e28
f
