A := -3
B := 1
C := -5
Xnac := -40
Xkon := 40
Ynac := -80
Ykon := 80
func(x, y) := A*x^2 + B*y^2 + C*sin(x)*cos(y)
f := integral(integral(func(x, y), x = Xnac .. Xkon), y = Ynac .. Ykon)
integral(integral(func(x, y), x = Xnac .. Xkon), y = Ynac .. Ykon) = 6826667
fa := integral(integral(sqrt(1 + (d/dx(func(x, y)))^2 + (d/dy(func(x, y)))^2), x = Xnac .. Xkon), y = Ynac .. Ykon)
f = 6826667
fa = 1983089
# [component: inputs func]
