A := 2
B := 2
C := 3
D := 3
Xnac := -60
Xkon := 60
Ynac := -60
Ykon := 60
func(x, y) := A*x^2 + B*y^2 + C*e^(-x) + D*e^(-y)
f := integral(integral(func(x, y), x = Xnac .. Xkon), y = Ynac .. Ykon)
integral(integral(func(x, y), x = Xnac .. Xkon), y = Ynac .. Ykon) = 8.22245e28
fa := integral(integral(sqrt(1 + (d/dx(func(x, y)))^2 + (d/dy(func(x, y)))^2), x = Xnac .. Xkon), y = Ynac .. Ykon)
f = 8.22245e28
fa = 8.16942e28
# [component: inputs func]
f
