A := 1
B := -3
C := 1
D := 5
Xnac := -100
Xkon := 100
Ynac := -20
Ykon := 20
func(x, y) := A*x^3 + B*y^3 + C*x^2 + D*y^2
f := integral(integral(func(x, y), x = Xnac .. Xkon), y = Ynac .. Ykon)
integral(integral(func(x, y), x = Xnac .. Xkon), y = Ynac .. Ykon) = 32000000
fa := integral(integral(sqrt(1 + (d/dx(func(x, y)))^2 + (d/dy(func(x, y)))^2), x = Xnac .. Xkon), y = Ynac .. Ykon)
f = 32000000
fa = 82743265
# [component: inputs func]
f
